h := READPRN("2011080100_hiromb_GI_60x434.txt")
FC_COUNT := 430  # Варианты ансамбля: h; s; n; свободный член
s := READPRN("2011080100_swan_GI_48x434.txt")
t6 := 0 .. FC_COUNT - 1
eInd := 0 .. 7
n := READPRN("2011080100_noswan_GI_48x434.txt")
FC_LENGTH := 48
d := READPRN("2011080100_measurements_GI_2623.txt")
tFC := 1 .. FC_LENGTH
C := [
    0, 0, 0, 33.739;
    0, 0, 1.078, -0.162;
    0, 0.969, 0, 2.81;
    0, 0.572, 0.453, 1.248;
    1.049, 0, 0, -34.537;
    0.663, 0, 0.427, -22.847;
    0.653, 0.387, 0, -21.114;
    0.64, 0.102, 0.338, -21.805
]
# RMSE для разных ансамблей
Predict(eInd, i, tFC) := C[eInd, 0]*h[i, tFC] + C[i, 1]*s[i, tFC] + C[eInd, 2]*n[i, tFC] + C[eInd, 3]
# ^
# Определение коэффициентов ансамбля (Given/Minerr)
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EnsErr[eInd, t6] := sqrt(1/FC_LENGTH*sum((C[eInd, 0]*h[t6, tFC] + C[eInd, 1]*s[t6, tFC] + C[eInd, 2]*n[t6, tFC] + C[eInd, 3] - d[t6*6 + tFC])^2, tFC))
Err(c1, c2, c3, c4) := sum(sum((c1*h[t6, tFC] + c2*s[t6, tFC] + c3*n[t6, tFC] + c4 - d[t6*6 + tFC])^2, tFC), t6)
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StateFunc(tInd) :=
    minValue ← min(EnsErr[:, tInd])
    for i ∈ eInd
        return i if EnsErr[i, tInd] == minValue
    0
States[t6] := StateFunc(t6)
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# Матрица переходов
MM(Seq) :=
    for i ∈ eInd
        for j ∈ eInd
            res[i, j] ← 0
    for i ∈ 1 .. rows(Seq) - 1
        res[(Seq[i - 1], Seq[i])] ← res[(Seq[i - 1], Seq[i])] + 1
    for j ∈ eInd
        s[j] ← sum(res[j, eInd], eInd)
    for i ∈ eInd
        for j ∈ eInd
            res[i, j] ← res[i, j]/s[i]
    res
M := MM(States) = [
    0.5, 0.25, 0, 0, 0, 0, 0.25, 0;
    0.027027, 0.540541, 0.0810811, 0.162162, 0, 0.108108, 0.0540541, 0.027027;
    0, 0.075, 0.45, 0.2, 0.05, 0.025, 0.175, 0.025;
    0, 0.153846, 0.115385, 0.192308, 0.0384615, 0.230769, 0.115385, 0.153846;
    0, 0, 0.0107527, 0, 0.580645, 0.182796, 0.139785, 0.0860215;
    0, 0.0606061, 0.040404, 0.020202, 0.191919, 0.535354, 0.111111, 0.040404;
    0.0102041, 0.0102041, 0.102041, 0.0306122, 0.163265, 0.102041, 0.489796, 0.0918367;
    0, 0.0625, 0.03125, 0.0625, 0.0625, 0.25, 0.375, 0.15625
]
# Ограничение переходов
LimitedStates(delta) :=
    res[0] ← States[0]
    for i ∈ 1 .. FC_COUNT - 1
        res[i] ← res[i - 1] if EnsErr[res[i - 1], i] - EnsErr[States[i], i] < delta
        res[i] ← States[i] otherwise
    res
LS_1cm := LimitedStates(1)
LS_2cm := LimitedStates(2)
LS_5cm := LimitedStates(5)
LS_10cm := LimitedStates(10)
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M_2cm := MM(LS_2cm) = [
    0.666667, 0, 0, 0, 0, 0, 0.333333, 0;
    0, 0.5, 0, 0, 0, 0.5, 0, 0;
    0, 0, 0.842105, 0, 0.157895, 0, 0, 0;
    0, 0, 0, 0.913043, 0.0434783, 0.0434783, 0, 0;
    0, 0.0131579, 0, 0.0263158, 0.934211, 0.0131579, 0, 0.0131579;
    0, 0, 0.0340909, 0, 0, 0.965909, 0, 0;
    0, 0, 0.0238095, 0, 0.0238095, 0, 0.952381, 0;
    0.00568182, 0, 0, 0, 0, 0, 0, 0.994318
]
M_5cm := MM(LS_5cm) = [
    0.75, 0, 0, 0, 0.25, 0, 0, 0;
    0, 0, 0, 0, 0, 0, 0, 0;
    0, 0, 0.8, 0, 0.2, 0, 0, 0;
    0, 0, 0, 0.993289, 0.00671141, 0, 0, 0;
    0.00413223, 0, 0, 0.00413223, 0.991736, 0, 0, 0;
    0, 0, 0, 0, 0, 0, 0, 0;
    0, 0, 0.0344828, 0, 0, 0, 0.965517, 0;
    0, 0, 0, 0, 0, 0, 0, 0
]
M_1cm := MM(LS_1cm)
M_10cm := MM(LS_10cm)
# Сопоставление моделей в ансамбле
# коэффициенты: n(t6) = K1 * s(t6) + K2 * h(t6)
EnsComb(m1, m2, m3) :=
    for tInd ∈ t6
        A ← [
            sum(m1[tInd, tFC]^2, tFC), sum(m1[tInd, tFC]*m2[tInd, tFC], tFC);
            sum(m1[tInd, tFC]*m2[tInd, tFC], tFC), sum(m2[tInd, tFC]^2, tFC)
        ]
        B ← [sum(m1[tInd, tFC]*m3[tInd, tFC], tFC); sum(m2[tInd, tFC]*m3[tInd, tFC], tFC)]
        x ← A^-1*B
        res[tInd, 0] ← x[0]
        res[tInd, 1] ← x[1]
    res
EC_sh_n := EnsComb(s, h, n)
EC_sn_h := EnsComb(s, n, h)
EC_nh_s := EnsComb(n, h, s)
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# Ничего особенного
# Выбросы, скорее всего связаны
# с близостью прогнозов s и n
# <==
# Выбросы в моменты ок. t6=180. В этот момент:
# а) пик уровня; б) большая ошибка ансабля 1 (s)
# Прогнозирование переходов
ForecastingStates(TM) :=
    res[0] ← States[0]
    count ← 1
    for i ∈ 1 .. FC_COUNT - 1
        count ← count + 1
        p ← TM[res[i - 1], res[i - 1]]^count
        maxTransitionIndex ← 0
        for j ∈ 1 .. rows(TM) - 1
            maxTransitionIndex ← j if j ≠ res[i - 1] and TM[res[i - 1], j] > TM[res[i - 1], maxTransitionIndex]
        res[i] ← res[i - 1] if TM[res[i - 1], maxTransitionIndex] < p
        otherwise
            res[i] ← maxTransitionIndex
            count ← 1
    res
FStates_Orig := ForecastingStates(M)
FStates_1cm := ForecastingStates(M_1cm)
FStates_2cm := ForecastingStates(M_2cm)
FStates_5cm := ForecastingStates(M_5cm)
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# Генерация с рандомизацией
TestM := M_2cm
eInd1 := 0 .. 7
TestM_NoKeep := TestM
TestM_NoKeep[eInd, eInd] := 0
M_F[eInd, eInd1] := sum(TestM[eInd, j], j = 0 .. eInd1)
TestM_NoKeep[eInd, eInd1] := TestM_NoKeep[eInd, eInd1]/(sum(TestM[eInd, j], j = 0 .. 7) - TestM[eInd, eInd])
M_F_NoKeep[eInd, eInd1] := sum(TestM_NoKeep[eInd, j], j = 0 .. eInd1)
TestM_NoKeep = [
    0, 0, 0, 0, 0, 0, 1, 0;
    0, 0, 0, 0, 0, 1, 0, 0;
    0, 0, 0, 0, 1, 0, 0, 0;
    0, 0, 0, 0, 0.5, 0.5, 0, 0;
    0, 0.2, 0, 0.4, 0, 0.2, 0, 0.2;
    0, 0, 1, 0, 0, 0, 0, 0;
    0, 0, 0.5, 0, 0.5, 0, 0, 0;
    1, 0, 0, 0, 0, 0, 0, 0
]
M_F_NoKeep = [
    0, 0, 0, 0, 0, 0, 1, 1;
    0, 0, 0, 0, 0, 1, 1, 1;
    0, 0, 0, 0, 1, 1, 1, 1;
    0, 0, 0, 0, 0.5, 1, 1, 1;
    0, 0.2, 0.2, 0.6, 0.6, 0.8, 0.8, 1;
    0, 0, 1, 1, 1, 1, 1, 1;
    0, 0, 0.5, 0.5, 1, 1, 1, 1;
    1, 1, 1, 1, 1, 1, 1, 1
]
# Генерация нового состояния при низкой вероятности сохранения
# Генерация нового состояния каждый раз
FStatesR :=
    res[0] ← States[0]
    count ← 1
    for i ∈ 1 .. FC_COUNT - 1
        count ← count + 1
        p ← TestM[res[i - 1], res[i - 1]]^count
        maxTransitionIndex ← 0
        for j ∈ 1 .. rows(TestM) - 1
            maxTransitionIndex ← j if j ≠ res[i - 1] and TestM[res[i - 1], j] > TestM[res[i - 1], maxTransitionIndex]
        res[i] ← res[i - 1] if TestM[res[i - 1], maxTransitionIndex] < p
        otherwise
            rTemp ← rnd(1)
            res[i] ← -1
            for j ∈ 0 .. rows(TestM) - 1
                res[i] ← j if res[i] < 0 and M_F_NoKeep[res[i - 1], j] ≥ rTemp
            count ← 1
    res
FStatesSimple :=
    res[0] ← States[0]
    for i ∈ 1 .. FC_COUNT - 1
        rTemp ← rnd(1)
        res[i] ← -1
        for j ∈ 0 .. rows(M_F) - 1
            res[i] ← j if res[i] < 0 and M_F[res[i - 1], j] ≥ rTemp
    res
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